// COMSOL Multiphysics 6.2.0.339 model "press_fatigue_.mph"
// Outline of the model tree

Parameters
  a = 300e-6[m]
  pois = 0.49
  YouM = 0.9e6[Pa]
  dens = 1150[kg/(m^3)]
  yiel = 865[MPa]
  def = 0.3
  strain = 0.03

Load and constraint groups
  lg1 "Load Group 1"

Geometry
  geom1 "Geometry 1" (3D, length unit m)
    imp1: Import | contributeto = csel1; type = cad; filename = D:\tr\HG\geometry\15gel.stp; cadtype = STEP
    boxsel1: BoxSelection | entitydim = 2; zmin = -3.0E-4; zmax = -1.5E-4; condition = allvertices
    boxsel2: BoxSelection | entitydim = 2; zmin = 1.5E-4; zmax = 3.0E-4; condition = allvertices
    fin: Finalize "Form Union"

Materials
  mat1: Common "Material 1" on domains 1
    def "Basic"
      density = dens
    Enu "Young's modulus and Poisson's ratio"
      E = YouM
      nu = pois
    fatigueStressBasquin "Basquin"
      sigmaf_Basquin = 30e6
      b_Basquin = -0.5
    fatigueStrainCoffinManson "Coffin–Manson"
      epsilonf_CM = 0.7
      c_CM = -0.5

Physics
  solid: SolidMechanics on all domains
    dependent variable u = {u, v, w}
    lemm1: LinearElasticModel "Linear Elastic Material 1" (default)
    free1: Free (default)
    init1: init "Initial Values 1" (default)
    disp1: Displacement2 "Prescribed Displacement 1" on selection geom1_boxsel2
      Direction = {free, free, prescribed}
      U0 = {0, 0, -a}
      loadGroup = lg1
    fix1: Fixed "Fixed Constraint 1" on selection geom1_boxsel1
  ftg: Fatigue
    elif1: StrainLifeModel "Strain-Life 1" on domains 1 | fatigueInputPhysics = solid; ftgElifCrit = CombinedBAndCM

Mesh
  mesh1 "Mesh 1" (physics-controlled)
    size: MeshSizeDefault | hauto = 3

Studies
  std1 "Study 1"
    param: Parametric "Parametric Sweep" (disabled) | pname = strain; plistarr = range(0,0.01,def)
    stat: Stationary
      useloadcase = on
      loadcase = {Load case 1, Load case 7, Load case 8}
      loadgroup = {on, on, on}
      loadgroupweight = {0, 0.5, 0}
  std2 "Study 2"
    ftge: Fatigue | geometricNonlinearity = on; usesol = on; notsolmethod = sol; notstudy = std1

Solver configurations
  sol1 "Solution 1" (study std1)
    v1: Variables "Dependent Variables 1"
    s1: Stationary "Stationary Solver 1"
      fc1: FullyCoupled | linsolver = d1
      d1: Direct "Suggested Direct Solver (solid)" | linsolver = pardiso; pivotperturb = 1.0E-9; nliniterrefine = on
      pDef: Parametric
  sol2 "Solution 2" (study std2)
    v1: Variables "Dependent Variables 1"
    s1: Stationary "Stationary Solver 1"
      dDef: Direct
      fcDef: FullyCoupled

Datasets
  dset1: Solution | solution = sol1
  dset2: Solution | solution = sol2

Derived values
  av1: AvVolume "Volume Average 1" on domains 1
    data = dset1
    table = tbl1
    expr = solid.misesGp
    descr = von Mises stress

Tables
  mrkvl1: Table "Maximum and Minimum Values"
    // Marker
    X | Y | Z | Cycles to failure (1)
    7.80134e-05 | -0.00015 | -0.0001446 | 413.015
  tbl1: Table
    // Volume Average 1
    loadcase | group.lg1 | von Mises stress (N/m^2) | von Mises stress (N/m^2) | von Mises stress (N/m^2) | von Mises stress (N/m^2) | von Mises stress (N/m^2)
    1 | 0 | 0 | 0 | 0 | 0 | 0
    2 | 0.05 | 45000.2 | 90000.3 | 180001 | 410240 | 369775
    3 | 0 | 0 | 0 | 0 | 0 | 0

Plots
  pg1: PlotGroup3D "Stress (solid)" | data = dset1
    vol1: Volume | data = dset1; expr = solid.misesGp
      def: Deform "Deformation" | expr = {u, v, w}; descr = Displacement field
  pg2: PlotGroup3D "Cycles to Failure (ftg)" | data = dset2
    surf1: Surface | expr = ftg.ctf
      mrkr1: Marker | display = min; table = mrkvl1